f(x) := x*(x + sin(3*x + 2))/(x^2 + x + 0.5)
f1lp(x, h) := (f(x) - f(x - h))/h  # (левая)
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f1p(x, h) := (f(x + h) - f(x - h))/(2*h)  # (центр)
f2p(x, h) := (f(x + h) - 2*f(x) + f(x - h))/h^2
f3p(x, h) := (f(x + 2*h) - 2*f(x + h) + 2*f(x - h) - f(x - 2*h))/(2*h^3)
f4p(x, h) := (f(x + 2*h) - 4*f(x + h) + 6*f(x) - 4*f(x - h) + f(x - 2*h))/h^4
x := 1
h0 := 10^-2
f1p(x, h0) = 0.737012
f1lp(x, h0) = 0.721259
f2p(x, h0) = 3.15046
f3p(x, h0) = -5.81625
f4p(x, h0) = -30.5153
f1t(x) := □  # error: Пустой местозаполнитель.
f1t(x) := d/dx(f(x)) → (x + sin(3*x + 2))/(x + x^2 + 0.5) + x*(3*cos(3*x + 2) + 1)/(x + x^2 + 0.5) - x*(x + sin(3*x + 2))*(2*x + 1)/(x + x^2 + 0.5)^2
f2t(x) := d/dx  # error: Эта переменная не определена.
f2t(x) := d^2/dx^2(f(x)) → 2*(3*cos(3*x + 2) + 1)/(x + x^2 + 0.5) - 2*(x + sin(3*x + 2))*(2*x + 1)/(x + x^2 + 0.5)^2 - 2*x*(x + sin(3*x + 2))/(x + x^2 + 0.5)^2 - 9*x*sin(3*x + 2)/(x + x^2 + 0.5) + 2*x*(x + sin(3*x + 2))*(2*x + 1)^2/(x + x^2 + 0.5)^3 - 2*x*(3*cos(3*x + 2) + 1)*(2*x + 1)/(x + x^2 + 0.5)^2
f3t(x) := d^3/dx^3(f(x)) → 6*(x + sin(3*x + 2))*(2*x + 1)^2/(x + x^2 + 0.5)^3 - 27*sin(3*x + 2)/(x + x^2 + 0.5) - 6*(3*cos(3*x + 2) + 1)*(2*x + 1)/(x + x^2 + 0.5)^2 - 6*x*(3*cos(3*x + 2) + 1)/(x + x^2 + 0.5)^2 - 27*x*cos(3*x + 2)/(x + x^2 + 0.5) - 6*(x + sin(3*x + 2))/(x + x^2 + 0.5)^2 + 27*x*sin(3*x + 2)*(2*x + 1)/(x + x^2 + 0.5)^2 + 6*x*(3*cos(3*x + 2) + 1)*(2*x + 1)^2/(x + x^2 + 0.5)^3 - 6*x*(x + sin(3*x + 2))*(2*x + 1)^3/(x + x^2 + 0.5)^4 + 4*x*(x + sin(3*x + 2))*(2*x + 1)/(x + x^2 + 0.5)^3 + 2*x*(x + sin(3*x + 2))*(8*x + 4)/(x + x^2 + 0.5)^3
f4t(x) := d^4/dx^4(f(x)) → 16*(x + sin(3*x + 2))*(2*x + 1)/(x + x^2 + 0.5)^3 - 108*cos(3*x + 2)/(x + x^2 + 0.5) - 24*(3*cos(3*x + 2) + 1)/(x + x^2 + 0.5)^2 + 8*(x + sin(3*x + 2))*(8*x + 4)/(x + x^2 + 0.5)^3 + 108*sin(3*x + 2)*(2*x + 1)/(x + x^2 + 0.5)^2 + 24*x*(x + sin(3*x + 2))/(x + x^2 + 0.5)^3 + 81*x*sin(3*x + 2)/(x + x^2 + 0.5) + 108*x*sin(3*x + 2)/(x + x^2 + 0.5)^2 + 24*(3*cos(3*x + 2) + 1)*(2*x + 1)^2/(x + x^2 + 0.5)^3 - 24*(x + sin(3*x + 2))*(2*x + 1)^3/(x + x^2 + 0.5)^4 + 108*x*cos(3*x + 2)*(2*x + 1)/(x + x^2 + 0.5)^2 - 24*x*(3*cos(3*x + 2) + 1)*(2*x + 1)^3/(x + x^2 + 0.5)^4 - 48*x*(x + sin(3*x + 2))*(2*x + 1)^2/(x + x^2 + 0.5)^4 + 24*x*(x + sin(3*x + 2))*(2*x + 1)^4/(x + x^2 + 0.5)^5 - 108*x*sin(3*x + 2)*(2*x + 1)^2/(x + x^2 + 0.5)^3 + 16*x*(3*cos(3*x + 2) + 1)*(2*x + 1)/(x + x^2 + 0.5)^3 + 8*x*(3*cos(3*x + 2) + 1)*(8*x + 4)/(x + x^2 + 0.5)^3 - 6*x*(x + sin(3*x + 2))*(2*x + 1)*(8*x + 4)/(x + x^2 + 0.5)^4
E(h) := |(f1p(x, h) - f1t(x))/f1t(x)|
E1(h) := |(f1lp(x, h) - f1t(x))/f1t(x)|
f1t(x) = 0.737109
E2(h) := |(f2p(x, h) - f2t(x))/f2t(x)|
f2t(x) = 3.15071
f3t(x) = -5.81879
E3(h) := |(f3p(x, h) - f3t(x))/f3t(x)|
f4t(x) = -30.5166
E4(h) := |(f4p(x, h) - f4t(x))/f4t(x)|
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E(3.3*10^-6) = 8.62593e-13
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E1(4*10^-9) = 8.52786e-10
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E2(6.8*10^-5) = 6.73103e-9
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E3(3*10^-4) = 9.46721e-7
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E4(1.6*10^-3) = 1.87676e-6
