f(x) := x/(x^2 + x + 0.5)*(x + sin(3*x + 2))
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f(0) = 0
# Исходные данные:
T := 2
n := 100
t[0] := 0
n4 := 4*n
t1[0] := t[0]
h := (T - t[0])/n
t4 := t[0]
h2 := h/2
h = 0.02
h4 := h/4
x[0] := 0.1
xh2[0] := x[0]
xh4[0] := x[0]
m2 := 0 .. 2*n
m := 0 .. n
m4 := 0 .. n4
# Метод Эйлера:
t4[m4 + 1] := m4*h4
t1[m2 + 1] := m2*h2
t[m + 1] := m*h
xh4[m4 + 1] := xh4[m4] + h4*f(xh4[m4])
xh2[m2 + 1] := xh2[m2] + h2*f(xh2[m2])
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x[m + 1] := x[m] + h*f(x[m])
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xh4[n] = 0.183545
xh2[n] = 0.280112
x[n] = 0.430363
# Метод 9 варианта:
K1(x2, h) := h*f(x2)
K2(x2, h) := h*f(x2 + K1(x2, h)/4)
K3(x2, h) := h*f(x2 + K2(x2, h)/2)
K4(x2, h) := h*f(x2 - K1(x2, h) - 2*K2(x2, h) + K3(x2, h))
xh42[0] := x[0]
xh22[0] := x[0]
x2[0] := x[0]
x2[m + 1] := x2[m] + K1(x2[m], h)/6 + 4/6*K3(x2[m], h) + K4(x2[m], h)/6
xh22[m2 + 1] := xh22[m2] + K1(xh22[m2], h2)/6 + 4/6*K3(xh22[m2], h2) + K4(xh22[m2], h2)/6
xh42[m4 + 1] := xh42[m4] + K1(xh42[m4], h4)/6 + 4/6*K3(xh42[m4], h4) + K4(xh42[m4], h4)/6
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# Метод Рунге-Кутты:
xx := [0.1; 1]
D(t, xx) := [xx[0]/(xx[0]^2 + xx[0] + 0.5)*(xx[0] + sin(3*xx[0] + 2)); 0]
Z4 := rkfixed(xx, t4[0], T, n4, D)
Z1 := rkfixed(xx, t1[0], T, 2*n, D)
Z := rkfixed(xx, t[0], T, n, D)
t41[m4] := Z4[m4, 0]
t1[m2] := Z1[m2, 0]
t[m] := Z[m, 0]
xx4[m4] := Z4[m4, 1]
xx1[m2] := Z1[m2, 1]
x1[m] := Z[m, 1]
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xh2[2*n] = 0.430232
xh4[n4] = 0.430167
x[n] = 0.430363
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xh22[2*n] = 0.430225
xh42[n4] = 0.430165
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x2[n] = 0.430334
xx1[2*n] = 0.430101
xx4[n4] = 0.430101
x1[n] = 0.430101
# Относительные погрешности:
E(p, x1, x2) := |(x1 - x2)/(2^p - 1)|*2^p
E(1, xh2[2*n], x[n]) = 0.000260557
E(1, xh4[n4], xh2[2*n]) = 0.000131163
E(3, xh22[2*n], x2[n]) = 0.000124555
E(3, xh42[n4], xh22[2*n]) = 6.89408e-5
E(4, xx1[2*n], x1[n]) = 1.82147e-10
E(4, xx4[n4], xx1[2*n]) = 1.14053e-11
