n := 10
i := 0 .. n
xij[0] := 1
xij[1] := 2
xij[2] := 3
xij[3] := 4
xij[4] := 5
xij[10] := 11
xij[5] := 6
xij[6] := 7
xij[7] := 8
xij[8] := 9
xij[9] := 10
y[0] := 5
y[1] := -1
y[2] := -6
y[3] := 3
y[4] := 0
j := 0 .. n
y[5] := 1
y[6] := 4
y[7] := -2
y[8] := 2
y[10] := -3
y[9] := 5
f(x) := sum(y[i]*product(if(i == j, 1, (x - xij[j])/(xij[i] - xij[j])), j), i)
# Результаты интерполирования
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# Исследование зависимости погрешности интерполирования от количества узлов
FX(x) := x/(x^2 + x + 0.5)*(x + sin(3*x + 2))
# Для 5 узлов:
n := 4
a := 0
b := 5
ii := 0 .. n
h := (b - a)/n
xi[ii] := a + ii*h
yi[ii] := FX(xi[ii])
i := 0 .. n
j := 0 .. n
f(x) := sum(yi[i]*product(if(i == j, 1, (x - xi[j])/(xi[i] - xi[j])), j), i)
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# Для 10 узлов: (рациональное количество узлов)
nn := 9
i := 0 .. nn
h := (b - a)/nn
xxi[i] := a + i*h
yyi[i] := FX(xxi[i])
i := 0 .. nn
j := 0 .. nn
f(x) := sum(yyi[i]*product(if(i == j, 1, (x - xxi[j])/(xxi[i] - xxi[j])), j), i)
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# Для 65 узлов:
n := 65
x0 := (a + b)/2
Δ := (b - a)/2
ii := 0 .. n
xi[ii] := x0 + Δ*cos((2*ii + 1)*π/(2*(n + 1)))
yi[ii] := FX(xi[ii])
i := 0 .. n
j := 0 .. n
f(x) := sum(yi[i]*product(if(i == j, 1, (x - xi[j])/(xi[i] - xi[j])), j), i)
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# Для 66 узлов:
n := 65
ii := 0 .. n
h := (b - a)/n
xi[ii] := a + ii*h
yi[ii] := FX(xi[ii])
j := 0 .. n
i := 0 .. n
f(x) := sum(yi[i]*product(if(i == j, 1, (x - xi[j])/(xi[i] - xi[j])), j), i)
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