FX(x) := (x/(x^2 + x + 0.5)*(x + sin(3*x + 2)))
a := 0
b := 2
m := 255
-количество*точек
p := π/(2*(m + 1))
d := (b - a)/2
h := (b - a)/m
s := (a + b)/2
ii := 0 .. m
A := 0.15
xi[ii] := a + ii*h
yi[ii] := FX(xi[ii]) + (rnd(1) - 0.5)*A
n := 9
-степень*полинома
nn := m + 1
z := regress(xi, yi, n)
-коэффициенты*полинома
ff(x) := interp(z, xi, yi, x)
j := 0 .. m
tx[j] := min(xi) + j*(max(xi) - min(xi))/(m + 1)
fff[j] := ff(tx[j])
-значения*полинома
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j := 0 .. m
DD[j] := |yi[j] - fff[j]|
DDD := sum((yi[kk] - fff[kk])^2, kk = 0 .. m)
DDD := DDD/(m - n)
jj := 0 .. m
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DDD = 0.00197205
-остаточная*дисперсия
ecp := mean(DD)
ecp = 0.0379222
-средняя*ошибка
emax := max(DD)
emax = 0.094856
-максимальная*ошибка
n := 1 .. 10
z[n] := regress(xi, yi, n)
ff(x, n) := interp(z[n], xi, yi, x)
tx[j] := min(xi) + j*(max(xi) - min(xi))/(m + 1)
fff(n, j) := ff(tx[j], n)
# Для n = 4:
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DDD(n) := sum((yi[kk] - fff(n, kk))^2, kk = 0 .. m)/(m - n)
n = [1; 2; 3; 4; 5; 6; 7; 8; 9; 10]
DDD(n) = [0.0408977; 0.0106735; 0.00995683; 0.00264507; 0.00205166; 0.00202374; 0.00201429; 0.00200039; 0.00197205; 0.00197143]
