m := 8
n := 2^m
nn := n - 1
n = 256
FX(x) := (x/(x^2 + x + 0.5)*(x + sin(3*x + 2)))
a := 0
b := 5
ii := 0 .. nn
h := (b - a)/nn
xi[ii] := a + ii*h
B := 0.15
yi[ii] := FX(xi[ii]) + (rnd(1) - 0.5)*B
A := fft(yi)
k := 10
j := 0 .. n/2
g[j] := if(j ≤ k, A[j], 0)
f := ifft(g)
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i := 0 .. n
k := 200
j := 0 .. n/2
g[j] := if(j ≤ k, A[j], 0)
f := ifft(g)
i := 0 .. n
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i := 0 .. k
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iii := 0 .. 255
ii := 0 .. 20
yi[ii] := 10
ii := 21 .. 50
yi[ii] := 25
ii := 51 .. 100
yi[ii] := 20
yi[ii] := 10
ii := 101 .. 255
A := fft(yi)
k := 15
j := 0 .. n/2
g[j] := if(j < k, A[j], 0)
f := ifft(g)
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i := 0 .. n
k := 100
j := 0 .. n/2
g[j] := if(j ≤ k, A[j], 0)
f := ifft(g)
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i := 0 .. n
