f(x) := (x/(x^2 + x + 0.5)*(x + sin(3*x + 2)))
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a := -10
b := 10
I := integral(f(x), x = a .. b)
I = 20.1887
# Метод средних прямоугольников
h(n) := (b - a)/n
J(n) := h(n)*sum(f(a + i*h(n) - h(n)/2), i = 1 .. n)
E(n, p) := 2^p*|J(2*n) - J(n)|/(2^p - 1)
p := 2
n := 20
E(n, p) = 1.17417
n := 40
E(n, p) = 0.0478746
n := 80
E(n, p) = 0.000360366
n := 160
E(n, p) = 6.70343e-5
J(n) = 20.1887
# Метод левых прямоугольников
J(n) := h(n)*sum(f(a + (i - 1)*h(n)), i = 1 .. n)
J(n) = 20.1998
E(n, p) := 2^p*|J(2*n) - J(n)|/(2^p - 1)
E(n, p) = 0.00736736
# Метод правых прямоугольников
J(n) := h(n)*sum(f(a + (i + 1)*h(n)), i = 1 .. n)
J(n) = 20.1529
E(n, p) := 2^p*|J(2*n) - J(n)|/(2^p - 1)
E(n, p) = 0.0245144
# Метод трапеций
J(n) := h(n)*(sum(f(a + i*h(n)), i = 1 .. n - 1) + (f(a) + f(b))/2)
E(n, p) := 2^p*|J(2*n) - J(n)|/(2^p - 1)
p := 2
n := 20
E(n, p) = 1.07591
n := 40
E(n, p) = 0.0491302
n := 80
E(n, p) = 0.000627844
n := 160
E(n, p) = 0.000133739
J(n) = 20.1885
# Метод Симпсона
J(n) := (4*sum(f(a + h(n)*(2*j - 1)), j = 1 .. n/2) + f(a) + f(b) + 2*sum(f(a + h(n)*2*j), j = 1 .. n/2 - 1))*h(n)/3
J(n) = 20.1887
E(n, p) := 2^p*|J(2*n) - J(n)|/(2^p - 1)
p := 4
n := 20
E(n, p) = 2.0309
J(n) = 21.7862
n := 40
E(n, p) = 0.339315
J(n) = 19.8822
n := 80
E(n, p) = 0.0124317
J(n) = 20.2003
# Несобственный интеграл - метод Симпсона
a := 0
b := 2
n := 10
h(n) := (b - a)/n
f(x) := f(x)*e^(-x)
J(n) := (4*sum(f(a + h(n)*(2*j - 1)), j = 1 .. n/2) + f(a) + f(b) + 2*sum(f(a + h(n)*2*j), j = 1 .. n/2 - 1))*h(n)/3
J(n) = 0.157338
E(n, p) := 2^p*|J(2*n) - J(n)|/(2^p - 1)
E(n, p) = 0.000277086
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integral(f(x), x = a .. ∞) = 0.25608
k1 := J(n)
b := b*2
n := n*2
h(n) := (b - a)/n
J(n) := (4*sum(f(a + h(n)*(2*j - 1)), j = 1 .. n/2) + f(a) + f(b) + 2*sum(f(a + h(n)*2*j), j = 1 .. n/2 - 1))*h(n)/3
k2 := J(n) = 0.24033
integral(f(x), x = a .. ∞) = 0.25608
|k2 - k1| = 0.0829926
b := b*2
n := n*2
h(n) := (b - a)/n
J(n) := (4*sum(f(a + h(n)*(2*j - 1)), j = 1 .. n/2) + f(a) + f(b) + 2*sum(f(a + h(n)*2*j), j = 1 .. n/2 - 1))*h(n)/3
k3 := J(n) = 0.25549
integral(f(x), x = a .. ∞) = 0.25608
|k3 - k2| = 0.0151594
# b | E
# 2 | 2.79*10^-5
# 4 | 7.748*10^-3
# 8 | 2.179*10^-4
